# OpenSim document version 40600
Model rat:
  Ground
  BodySet:
    Body spine: mass=0.12 mass_center=(0 0 0) inertia=(4.8e-6 4.8e-6 4.8e-6 0 0 0) meshes=spine.vtp
    Body pelvis: mass=0.005907314 mass_center=(0.004320691 0.0001897701 -0.002863543)
        inertia=(8.036287e-8 8.628699e-7 8.977075e-7 -1.105342e-7 -7.48408e-8 -2.701159e-8) meshes=pelvis.vtp
      WrapCylinder hip_cylinder_small: xyz_body_rotation=(0 1.48353 0) translation=(0.01 0.002 -0.0045) quadrant=-x
          radius=0.005 length=0.06
      WrapCylinder hip_cylinder_small2: xyz_body_rotation=(0 1.48353 0) translation=(0.01 0.001 -0.0045) quadrant=all
          radius=0.005 length=0.06
      WrapCylinder hip_cylinder_large2: xyz_body_rotation=(0 1.48353 0) translation=(0.01 0.004 0.003) quadrant=-x
          radius=0.0025 length=0.06
    Body femur: mass=0.01046222 mass_center=(-0.0007576199 -0.01707451 0.001482736)
        inertia=(1.372452e-6 4.191253e-7 1.333658e-6 7.649339e-9 3.713771e-9 -1.959259e-7) meshes=femur.vtp
      WrapCylinder femur_prox: xyz_body_rotation=(0 0.4363323 0) translation=(0.001 -0.006 0) quadrant=-x radius=0.0046
          length=0.05
      WrapCylinder femur_prox2: xyz_body_rotation=(0 0.4363323 0) translation=(0.001 -0.006 0) quadrant=all
          radius=0.0046 length=0.05
      WrapTorus femur_dist: xyz_body_rotation=(1.724888 0 0.09774542) translation=(0.00543 -0.03003 -0.00046)
          quadrant=all inner_radius=0.004 outer_radius=0.006
      WrapCylinder femur_shaft_large: xyz_body_rotation=(1.724888 0 -0.7853982)
          translation=(-0.00064 -0.015595 0.00185) quadrant=y radius=0.0027 length=0.03058
      WrapCylinder femur_shaft_small: xyz_body_rotation=(1.724888 0 0.09774542)
          translation=(-0.00064 -0.015095 0.00185) quadrant=all radius=0.0018 length=0.02958
    Body tibia: mass=0.00527104 mass_center=(0.001344187 0.02406107 -0.0007270357)
        inertia=(7.713131e-7 8.899532e-8 7.812216e-7 -1.683113e-9 5.188781e-9 -4.350367e-10) meshes=tibia.vtp
      WrapSphere tibia_prox: translation=(0.00062 0.0346 -0.001) quadrant=all radius=0.005
      WrapCylinder tibia_shaft: xyz_body_rotation=(1.570796 0 0) translation=(0 0.0241 0) quadrant=all radius=0.0035
          length=0.0282
      WrapCylinder tibia_shaft2: xyz_body_rotation=(1.570796 0 0) translation=(0 0.0241 0) quadrant=-y radius=0.0035
          length=0.0282
      WrapSphere ankle_sphere: translation=(0.00119 0.00233 0.00015) quadrant=all radius=0.0025
      WrapTorus ankle_torus: xyz_body_rotation=(1.570796 0 0) translation=(0.00119 0.00233 0.00015) quadrant=all
          inner_radius=0.001 outer_radius=0.004
      WrapCylinder mal_med: translation=(-0.002 0 -0.0015) quadrant=-x radius=0.0015 length=0.008
      WrapCylinder mal_lat: translation=(-0.002 0 0.0027) quadrant=+x radius=0.0015 length=0.008
    Body foot: mass=0.0006152257 mass_center=(0.009261436 -0.00574712 0.001006933)
        inertia=(9.310017e-9 3.877617e-8 4.093671e-8 1.349873e-8 -3.112835e-9 1.48843e-9) meshes=foot.vtp
  JointSet:
    CustomJoint spine_j: socket_parent_frame=ground_offset socket_child_frame=spine_offset
      Coordinate sacrum_pitch
      Coordinate sacrum_roll
      Coordinate sacrum_yaw
      Coordinate sacrum_x
      Coordinate sacrum_y
      Coordinate sacrum_z
      PhysicalOffsetFrame ground_offset: socket_parent=/ground translation=(0 0 0)
      PhysicalOffsetFrame spine_offset: socket_parent=/bodyset/spine translation=(0 0 0)
      SpatialTransform:
        TransformAxis rotation1: coordinates=sacrum_pitch axis=(0 0 1) LinearFunction(coefficients=1 0)
        TransformAxis rotation2: coordinates=sacrum_roll axis=(1 0 0) LinearFunction(coefficients=1 0)
        TransformAxis rotation3: coordinates=sacrum_yaw axis=(0 1 0) LinearFunction(coefficients=1 0)
        TransformAxis translation1: coordinates=sacrum_x axis=(1 0 0) LinearFunction(coefficients=1 0)
        TransformAxis translation2: coordinates=sacrum_y axis=(0 1 0) LinearFunction(coefficients=1 0)
        TransformAxis translation3: coordinates=sacrum_z axis=(0 0 1) LinearFunction(coefficients=1 0)
    CustomJoint pelvis_j: socket_parent_frame=spine_offset socket_child_frame=pelvis_offset
      Coordinate sacroiliac_flx
      PhysicalOffsetFrame spine_offset: socket_parent=/bodyset/spine translation=(0.005 -0.003 0.01)
      PhysicalOffsetFrame pelvis_offset: socket_parent=/bodyset/pelvis translation=(0 0 0)
      SpatialTransform:
        TransformAxis rotation1: coordinates=sacroiliac_flx axis=(0 0 1) LinearFunction(coefficients=1 0)
        TransformAxis rotation2: axis=(1 0 0)
        TransformAxis rotation3: axis=(0 1 0)
        TransformAxis translation1: axis=(1 0 0)
        TransformAxis translation2: axis=(0 1 0)
        TransformAxis translation3: axis=(0 0 1)
    CustomJoint femur_j: socket_parent_frame=pelvis_offset socket_child_frame=femur_offset
      Coordinate hip_flx
      Coordinate hip_add
      Coordinate hip_int
      PhysicalOffsetFrame pelvis_offset: socket_parent=/bodyset/pelvis translation=(0 0 0)
      PhysicalOffsetFrame femur_offset: socket_parent=/bodyset/femur translation=(0 0 0)
      SpatialTransform:
        TransformAxis rotation1: coordinates=hip_flx axis=(0 0 1) LinearFunction(coefficients=1 0)
        TransformAxis rotation2: coordinates=hip_add axis=(1 0 0) LinearFunction(coefficients=1 0)
        TransformAxis rotation3: coordinates=hip_int axis=(0 1 0) LinearFunction(coefficients=1 0)
        TransformAxis translation1: axis=(1 0 0)
        TransformAxis translation2: axis=(0 1 0)
        TransformAxis translation3: axis=(0 0 1)
    CustomJoint tibia_j: socket_parent_frame=femur_offset socket_child_frame=tibia_offset
      Coordinate knee_flx
      PhysicalOffsetFrame femur_offset: socket_parent=/bodyset/femur translation=(0 0 0)
      PhysicalOffsetFrame tibia_offset: socket_parent=/bodyset/tibia translation=(0 0 0)
      SpatialTransform:
        TransformAxis rotation1: coordinates=knee_flx axis=(0 0 1) LinearFunction(coefficients=1 0)
        TransformAxis rotation2: coordinates=knee_flx axis=(1 0 0)
          SimmSpline: x=(-2.61799 -2.44346 -2.26893 -2.0944 -1.91986 -1.74533 -1.5708 -1.39626 -1.22173 -1.0472 -0.872665 -0.698132 -0.523599 -0.349066)
              y=(-0.0872665 -0.0750492 -0.0645772 -0.0523599 -0.0401426 -0.0296706 -0.0174533 -0.00523599 0.00523599 0.0174533 0.0296706 0.0401426 0.0523599 0.0645772)
        TransformAxis rotation3: coordinates=knee_flx axis=(0 1 0)
          SimmSpline: x=(-2.61799 -2.44346 -2.26893 -2.0944 -1.91986 -1.74533 -1.5708 -1.39626 -1.22173 -1.0472 -0.872665 -0.698132 -0.523599 -0.349066)
              y=(0.261799 0.261799 0.261799 0.261799 0.261799 0.261799 0.261799 0.261799 0.261799 0.261799 0.261799 0.261799 0.261799 0.261799)
        TransformAxis translation1: coordinates=knee_flx axis=(1 0 0)
          SimmSpline: x=(-2.61799 -2.44346 -2.26893 -2.0944 -1.91986 -1.74533 -1.5708 -1.39626 -1.22173 -1.0472 -0.872665 -0.698132 -0.523599 -0.349066)
              y=(-0.02492 -0.0301 -0.03449 -0.03798 -0.04049 -0.04196 -0.04232 -0.04156 -0.03968 -0.0367 -0.03267 -0.02769 -0.02188 -0.01539)
        TransformAxis translation2: coordinates=knee_flx axis=(0 1 0)
          SimmSpline: x=(-2.61799 -2.44346 -2.26893 -2.0944 -1.91986 -1.74533 -1.5708 -1.39626 -1.22173 -1.0472 -0.872665 -0.698132 -0.523599 -0.349066)
              y=(0.00082 -0.00322 -0.00805 -0.01353 -0.01952 -0.02588 -0.03244 -0.03905 -0.04552 -0.05167 -0.05732 -0.06229 -0.0664 -0.0695)
        TransformAxis translation3: coordinates=knee_flx axis=(0 0 1)
          SimmSpline: x=(-2.61799 -2.44346 -2.26893 -2.0944 -1.91986 -1.74533 -1.5708 -1.39626 -1.22173 -1.0472 -0.872665 -0.698132 -0.523599 -0.349066)
              y=(0.00227 0.00198 0.00161 0.00117 0.00067 0.00013 -0.00043 -0.00101 -0.00157 -0.00211 -0.00261 -0.00305 -0.00342 -0.00371)
    CustomJoint foot_j: socket_parent_frame=tibia_offset socket_child_frame=foot_offset
      Coordinate ankle_flx
      Coordinate ankle_add
      Coordinate ankle_int
      PhysicalOffsetFrame tibia_offset: socket_parent=/bodyset/tibia translation=(0 0 0)
      PhysicalOffsetFrame foot_offset: socket_parent=/bodyset/foot translation=(0 0 0)
      SpatialTransform:
        TransformAxis rotation1: coordinates=ankle_flx axis=(0 0 1) LinearFunction(coefficients=1 0)
        TransformAxis rotation2: coordinates=ankle_add axis=(1 0 0) LinearFunction(coefficients=1 0)
        TransformAxis rotation3: coordinates=ankle_int axis=(0 1 0) LinearFunction(coefficients=1 0)
        TransformAxis translation1: coordinates=ankle_flx axis=(1 0 0)
          SimmSpline: x=(-0.523599 -0.349066 -0.174533 0 0.174533 0.349066 0.523599 0.698132 0.872665 1.0472)
              y=(0 0 0 0 0 0 0 0 0 0)
        TransformAxis translation2: coordinates=ankle_flx axis=(0 1 0)
          SimmSpline: x=(-0.523599 -0.349066 -0.174533 0 0.174533 0.349066 0.523599 0.698132 0.872665 1.0472)
              y=(0 0 0 0 0 0 0 0 0 0)
        TransformAxis translation3: coordinates=ankle_flx axis=(0 0 1)
          SimmSpline: x=(-0.523599 -0.349066 -0.174533 0 0.174533 0.349066 0.523599 0.698132 0.872665 1.0472)
              y=(0 0 0 0 0 0 0 0 0 0)
  ForceSet:
    Thelen2003Muscle BFa: min_control=0.01 max_control=1 max_isometric_force=3.237944 optimal_fiber_length=0.0389
        tendon_slack_length=0.0070273 pennation_angle_at_optimal=0.06283185
      PathPoint BFa_p0: spine (-0.0024 0.0045 0.0031)
      PathPoint BFa_p1: femur (-0.0001 -0.0302 0.0016)
      PathWrap: wrap_object=hip_cylinder_large2 method=hybrid
    Thelen2003Muscle BFp: min_control=0.01 max_control=1 max_isometric_force=12.19898 optimal_fiber_length=0.0369
        tendon_slack_length=0.00995041 pennation_angle_at_optimal=0.06283185
      PathPoint BFp_p0: pelvis (-0.0131 0.0024 -0.0023)
      PathPoint BFp_p1: tibia (0.0035 0.0239 0.0026)
      PathWrap: wrap_object=femur_prox method=hybrid
      PathWrap pathwrap_0: wrap_object=tibia_shaft method=hybrid
    Thelen2003Muscle CF: min_control=0.01 max_control=1 max_isometric_force=1.904673 optimal_fiber_length=0.0372
        tendon_slack_length=0.001277134 pennation_angle_at_optimal=0
      PathPoint CF_p0: spine (-0.0039 0.0063 0.0035)
      PathPoint CF_p1: femur (-0.0025 -0.0262 -0.002)
      PathWrap: wrap_object=hip_cylinder_small method=hybrid
      PathWrap pathwrap_0: wrap_object=femur_prox method=hybrid
    Thelen2003Muscle STp: min_control=0.01 max_control=1 max_isometric_force=0.6983801 optimal_fiber_length=0.0389
        tendon_slack_length=0.01310909 pennation_angle_at_optimal=0
      PathPoint STp_p0: spine (-0.0056 0.0041 0.0037)
      PathPoint STp_p1: tibia (0.0047 0.0231 0)
      PathWrap: wrap_object=femur_prox2 method=hybrid
      PathWrap pathwrap_0: wrap_object=tibia_shaft2 method=hybrid
      PathWrap pathwrap_1: wrap_object=hip_cylinder_small method=hybrid
    Thelen2003Muscle STa: min_control=0.01 max_control=1 max_isometric_force=2.630263 optimal_fiber_length=0.0369
        tendon_slack_length=0.01066298 pennation_angle_at_optimal=0
      PathPoint STa_p0: pelvis (-0.0145 0.0012 -0.0009)
      PathPoint STa_p1: tibia (0.0047 0.0231 0)
      PathWrap: wrap_object=femur_prox method=hybrid
      PathWrap pathwrap_0: wrap_object=tibia_shaft2 method=hybrid
    Thelen2003Muscle SM: min_control=0.01 max_control=1 max_isometric_force=9.387317 optimal_fiber_length=0.035
        tendon_slack_length=0.008722117 pennation_angle_at_optimal=0.03665191
      PathPoint SM_p0: pelvis (-0.0137 -0.0011 -0.0037)
      PathPoint SM_p1: tibia (0.0022 0.035 -0.0026)
      PathWrap: wrap_object=tibia_shaft2 method=hybrid
    Thelen2003Muscle QF: min_control=0.01 max_control=1 max_isometric_force=2.684682 optimal_fiber_length=0.0108
        tendon_slack_length=0.002967455 pennation_angle_at_optimal=0
      PathPoint QF_p0: pelvis (-0.0106 -0.0007 -0.0024)
      PathPoint QF_p1: femur (-0.0029 -0.0044 0.0011)
      PathWrap: wrap_object=femur_shaft_small method=hybrid
    Thelen2003Muscle TFL: min_control=0.01 max_control=1 max_isometric_force=2.630263 optimal_fiber_length=0.015
        tendon_slack_length=0.007749125 pennation_angle_at_optimal=0.01745329
      PathPoint TFL_p0: pelvis (0.0213 0.0006 0.0026)
      PathPoint TFL_p1: femur (-0.001 -0.01 0.006)
    Thelen2003Muscle GMa: min_control=0.01 max_control=1 max_isometric_force=5.423783 optimal_fiber_length=0.0192
        tendon_slack_length=0.01006796 pennation_angle_at_optimal=0.01919862
      PathPoint GMa_p0: spine (0.0202 0.0056 0.0041)
      PathPoint GMa_p1: femur (-0.0015 -0.0098 0.0064)
      PathWrap: wrap_object=hip_cylinder_large2 method=hybrid
    Thelen2003Muscle GMe: min_control=0.01 max_control=1 max_isometric_force=16.47996 optimal_fiber_length=0.0196
        tendon_slack_length=0.00403463 pennation_angle_at_optimal=0.01047198
      PathPoint GMe_p0: pelvis (0.0202 0.004 -0.0001)
      PathPoint GMe_p1: femur (-0.0027 -0.0033 0.0064)
      PathWrap: wrap_object=hip_cylinder_small2 method=hybrid
      PathWrap pathwrap_0: wrap_object=femur_shaft_large method=hybrid
    Thelen2003Muscle GMi: min_control=0.01 max_control=1 max_isometric_force=6.711705 optimal_fiber_length=0.0116
        tendon_slack_length=0.002352511 pennation_angle_at_optimal=0
      PathPoint GMi_p0: pelvis (0.013 0.0009 0.0004)
      PathPoint GMi_p1: femur (-0.0004 -0.0001 0.0048)
    Thelen2003Muscle Pir: min_control=0.01 max_control=1 max_isometric_force=10.15826 optimal_fiber_length=0.0106
        tendon_slack_length=0.003816063 pennation_angle_at_optimal=0
      PathPoint Pir_p0: pelvis (0.0114 0.0042 -0.0007)
      PathPoint Pir_p1: femur (-0.0014 0.0009 0.004)
    Thelen2003Muscle GP: min_control=0.01 max_control=1 max_isometric_force=2.058861 optimal_fiber_length=0.0287
        tendon_slack_length=0.01540358 pennation_angle_at_optimal=0
      PathPoint GP_p0: pelvis (-0.0148 -0.0055 -0.0063)
      PathPoint GP_p1: tibia (0.0049 0.0266 -0.0018)
      PathWrap: wrap_object=tibia_shaft2 method=hybrid
    Thelen2003Muscle GA: min_control=0.01 max_control=1 max_isometric_force=1.242572 optimal_fiber_length=0.0297
        tendon_slack_length=0.006291137 pennation_angle_at_optimal=0
      PathPoint GA_p0: pelvis (-0.0065 -0.0059 -0.0061)
      PathPoint GA_p1: tibia (0.0032 0.0289 -0.0017)
      PathWrap: wrap_object=tibia_shaft2 method=hybrid
    Thelen2003Muscle AL: min_control=0.01 max_control=1 max_isometric_force=4.371678 optimal_fiber_length=0.0163
        tendon_slack_length=0.004264324 pennation_angle_at_optimal=0.07330383
      PathPoint AL_p0: pelvis (-0.0045 -0.005 -0.0053)
      PathPoint AL_p1: femur (-0.0016 -0.017 0.0011)
    Thelen2003Muscle AM: min_control=0.01 max_control=1 max_isometric_force=5.840997 optimal_fiber_length=0.0279
        tendon_slack_length=0.005681842 pennation_angle_at_optimal=0
      PathPoint AM_p0: pelvis (-0.0061 -0.0053 -0.0056)
      PathPoint AM_p1: femur (-0.0006 -0.03 -0.0031)
    Thelen2003Muscle AB: min_control=0.01 max_control=1 max_isometric_force=1.188153 optimal_fiber_length=0.0224
        tendon_slack_length=0.00395983 pennation_angle_at_optimal=0
      PathPoint AB_p0: pelvis (-0.0107 -0.0058 -0.0066)
      PathPoint AB_p1: femur (-0.0016 -0.0164 0.0035)
    Thelen2003Muscle Pec: min_control=0.01 max_control=1 max_isometric_force=3.310503 optimal_fiber_length=0.0081
        tendon_slack_length=0.002166549 pennation_angle_at_optimal=0
      PathPoint Pec_p0: pelvis (0.0009 -0.0034 -0.0033)
      PathPoint Pec_p1: femur (-0.0018 -0.0107 0.0019)
    Thelen2003Muscle IP: min_control=0.01 max_control=1 max_isometric_force=13.94946 optimal_fiber_length=0.017
        tendon_slack_length=0.03497973 pennation_angle_at_optimal=0.2984513
      PathPoint IP_p0: spine (0.0537 0.005 0.003)
      PathPoint IP_p1: femur (-0.0021 -0.0053 0.0001)
    Thelen2003Muscle OE: min_control=0.01 max_control=1 max_isometric_force=6.448678 optimal_fiber_length=0.0058
        tendon_slack_length=0.004172899 pennation_angle_at_optimal=0
      PathPoint OE_p0: pelvis (-0.0089 -0.0027 -0.0031)
      PathPoint OE_p1: femur (-0.0016 0.0005 0.0035)
    Thelen2003Muscle OI: min_control=0.01 max_control=1 max_isometric_force=2.684682 optimal_fiber_length=0.0044
        tendon_slack_length=0.004356056 pennation_angle_at_optimal=0
      PathPoint OI_p0: pelvis (-0.0063 0.0048 -0.0026)
      PathPoint OI_p1: femur (-0.0019 0.0007 0.0024)
    Thelen2003Muscle GS: min_control=0.01 max_control=1 max_isometric_force=0.353725 optimal_fiber_length=0.006
        tendon_slack_length=0.0005502071 pennation_angle_at_optimal=0
      PathPoint GS_p0: pelvis (0.0029 0.0014 -0.0022)
      PathPoint GS_p1: femur (-0.0011 0.0015 0.0024)
    Thelen2003Muscle GI: min_control=0.01 max_control=1 max_isometric_force=2.593983 optimal_fiber_length=0.0041
        tendon_slack_length=0.003574381 pennation_angle_at_optimal=0
      PathPoint GI_p0: pelvis (-0.0056 0.0024 -0.0013)
      PathPoint GI_p1: femur (-0.0031 -0.0007 0.0021)
    Thelen2003Muscle RF: min_control=0.01 max_control=1 max_isometric_force=14.79296 optimal_fiber_length=0.0119
        tendon_slack_length=0.0304216 pennation_angle_at_optimal=0.4433136
      PathPoint RF_p0: pelvis (0.0045 -0.0001 0.0015)
      PathPoint RF_p1: tibia (0.0026 0.0375 0.0005)
      PathWrap: wrap_object=femur_dist method=hybrid
      PathWrap pathwrap_0: wrap_object=femur_shaft_small method=hybrid
    Thelen2003Muscle VL: min_control=0.01 max_control=1 max_isometric_force=12.9155 optimal_fiber_length=0.0194
        tendon_slack_length=0.02118658 pennation_angle_at_optimal=0.1745329
      PathPoint VL_p0: femur (-0.0011 -0.0036 0.0056)
      PathPoint VL_p1: tibia (0.0026 0.0375 0.0005)
      PathWrap: wrap_object=femur_dist method=hybrid
      PathWrap pathwrap_0: wrap_object=femur_shaft_small method=hybrid
    Thelen2003Muscle VI: min_control=0.01 max_control=1 max_isometric_force=2.84794 optimal_fiber_length=0.0113
        tendon_slack_length=0.02100096 pennation_angle_at_optimal=0.1204277
      PathPoint VI_p0: femur (0.0008 -0.0116 0.0032)
      PathPoint VI_p1: tibia (0.0026 0.0375 0.0005)
      PathWrap: wrap_object=femur_dist method=hybrid
      PathWrap pathwrap_0: wrap_object=femur_shaft_small method=hybrid
    Thelen2003Muscle VM: min_control=0.01 max_control=1 max_isometric_force=4.562145 optimal_fiber_length=0.0153
        tendon_slack_length=0.02218016 pennation_angle_at_optimal=0.4310963
      PathPoint VM_p0: femur (-0.0002 -0.0074 0.0012)
      PathPoint VM_p1: tibia (0.0026 0.0375 0.0005)
      PathWrap: wrap_object=femur_dist method=hybrid
      PathWrap pathwrap_0: wrap_object=femur_shaft_small method=hybrid
    Thelen2003Muscle MG: min_control=0.01 max_control=1 max_isometric_force=10.16733 optimal_fiber_length=0.0143
        tendon_slack_length=0.02450173 pennation_angle_at_optimal=0.2443461
      PathPoint MG_p0: femur (-0.0027 -0.0278 -0.0021)
      PathPoint MG_p1: foot (-0.004 0.0004 0.001)
    Thelen2003Muscle LG: min_control=0.01 max_control=1 max_isometric_force=12.84294 optimal_fiber_length=0.0123
        tendon_slack_length=0.0262669 pennation_angle_at_optimal=0.2478368
      PathPoint LG_p0: femur (-0.003 -0.0284 0.0017)
      PathPoint LG_p1: foot (-0.004 0.0004 0.001)
    Thelen2003Muscle Pla: min_control=0.01 max_control=1 max_isometric_force=5.396573 optimal_fiber_length=0.0123
        tendon_slack_length=0.0265731 pennation_angle_at_optimal=0.286234
      PathPoint Pla_p0: femur (-0.0023 -0.0275 0.0011)
      PathPoint Pla_p1: foot (-0.004 0.0004 0.001)
    Thelen2003Muscle Sol: min_control=0.01 max_control=1 max_isometric_force=1.342341 optimal_fiber_length=0.0156
        tendon_slack_length=0.01881871 pennation_angle_at_optimal=0.06806784
      PathPoint Sol_p0: tibia (-0.0033 0.0335 0.0024)
      PathPoint Sol_p1: foot (-0.004 0.0004 0.001)
    Thelen2003Muscle TA: min_control=0.01 max_control=1 max_isometric_force=7.927067 optimal_fiber_length=0.0149
        tendon_slack_length=0.02178929 pennation_angle_at_optimal=0.2234021
      PathPoint TA_p0: tibia (0.0033 0.0336 0.0026)
      PathPoint TA_via: tibia (0.00286 0.00257 -0.0022)
      PathPoint TA_p1: foot (0.0048 -0.0022 -0.0007)
    Thelen2003Muscle EDL: min_control=0.01 max_control=1 max_isometric_force=1.877463 optimal_fiber_length=0.0134
        tendon_slack_length=0.02972798 pennation_angle_at_optimal=0.1570796
      PathPoint EDL_p0: femur (-0.0015 -0.0318 0.0024)
      PathPoint EDL_via: tibia (0.00217 0.00253 -0.00101)
      PathPoint EDL_p1: foot (0.0034 -0.0017 0.0011)
    Thelen2003Muscle TP: min_control=0.01 max_control=1 max_isometric_force=3.954464 optimal_fiber_length=0.0053
        tendon_slack_length=0.03367422 pennation_angle_at_optimal=0.4537856
      PathPoint TP_p0: tibia (-0.0015 0.0339 0.0001)
      PathPoint TP_p1: foot (-0.0007 -0.0017 -0.0011)
      PathWrap TP_mal: wrap_object=mal_med method=hybrid
    Thelen2003Muscle FDL: min_control=0.01 max_control=1 max_isometric_force=9.115221 optimal_fiber_length=0.0088
        tendon_slack_length=0.0570867 pennation_angle_at_optimal=0.3368485
      PathPoint FDL_p0: tibia (-0.0025 0.0354 0)
      PathPoint FDL_p1: foot (0.023 -0.012 0.002)
      PathWrap FDL_mal: wrap_object=mal_med method=hybrid
    Thelen2003Muscle FHL: min_control=0.01 max_control=1 max_isometric_force=0.6167512 optimal_fiber_length=0.0054
        tendon_slack_length=0.05872574 pennation_angle_at_optimal=0.1308997
      PathPoint FHL_p0: tibia (-0.0015 0.0339 0.0001)
      PathPoint FHL_p1: foot (0.023 -0.012 0.001)
      PathWrap FHL_mal: wrap_object=mal_med method=hybrid
    Thelen2003Muscle Per: min_control=0.01 max_control=1 max_isometric_force=6.838683 optimal_fiber_length=0.0088
        tendon_slack_length=0.02939949 pennation_angle_at_optimal=0.2844887
      PathPoint Per_p0: tibia (-0.0019 0.0353 0.0029)
      PathPoint Per_p1: foot (0.0028 -0.0027 0.0017)
      PathWrap Per_mal: wrap_object=mal_lat method=hybrid
    Thelen2003Muscle Pop: min_control=0.01 max_control=1 max_isometric_force=2.621193 optimal_fiber_length=0.0063
        tendon_slack_length=0.00823613 pennation_angle_at_optimal=0
      PathPoint Pop_p0: femur (-0.0024 -0.0308 0.0017)
      PathPoint Pop_p1: tibia (0.0006 0.0271 -0.0023)
      PathWrap: wrap_object=tibia_prox method=hybrid
